// SBML level 2 version 4

model FAS_yeast()
  // Fatty acid synthesis yeast

  // Compartments:
  compartment cytoplasm = 1;
  compartment extracellular = 1; extracellular is "extracullar";
  compartment mitochondria = 0.5;

  // Species:
  species GLCi in cytoplasm = 0.087; GLCi is "glucose";
  species G6P in cytoplasm = 1.39; G6P is "glucose-6-phosphate";
  species F6P in cytoplasm = 0.28; F6P is "fructose-6-phosphate";
  species F16P in cytoplasm = 0.1; F16P is "fructose-1,6-bisphosphate";
  species GP in cytoplasm = 2.585; GP is "glycerone-phosphate";
  species G3P in cytoplasm = 2.585; G3P is "glyceraldehyde-3-phosphate";
  species NADH in cytoplasm = 0.39;
  species NAD in cytoplasm = 1.2;
  species $PHOS in cytoplasm = 30; PHOS is "phosphate";
  species BPG in cytoplasm = 0; BPG is "1,3-bisphosphoglycerate";
  species P3G in cytoplasm = 0.1; P3G is "3-phosphoglycerate";
  species P2G in cytoplasm = 0.1; P2G is "2-phosphoglycerate";
  species PEP in cytoplasm = 0.1; PEP is "phosphoenolpyruvate";
  species PYR in cytoplasm = 3.36; PYR is "pyruvate";
  species ACE in cytoplasm = 0.04; ACE is "acetaldehyde";
  species $GLCo in extracellular = 1; GLCo is "glucose";
  species GLY in cytoplasm = 0.15; GLY is "glycerol";
  species $ETOH in cytoplasm = 50; ETOH is "ethanol";
  species $CO2 in cytoplasm = 8;
  species ATP in cytoplasm = 1.66116;
  species $ADP in cytoplasm = 1.6769;
  species AMP in cytoplasm = 0.76156;
  species $F26BP in cytoplasm = 0.02; F26BP is "fructose-2,6-bisphosphate";
  species $GLYout in extracellular = 8.67; GLYout is "glycerol";
  species $H in cytoplasm = 50; H is "H+";
  species $H2O in cytoplasm = 50;
  species PYR_M in mitochondria = 0.001; PYR_M is "pyruvate";
  species coA_M in mitochondria = 1;
  species NAD_M in mitochondria = 1.2;
  species ac_coA_M in mitochondria = 0.1; ac_coA_M is "acetyl-coA";
  species NADH_M in mitochondria = 0.39;
  species CO2_M in mitochondria = 2;
  species OAA_M in mitochondria = 2; OAA_M is "oxaloacetate";
  species $H2O_M in mitochondria = 50;
  species CIT_M in mitochondria = 0.5; CIT_M is "citrate";
  species CIT in cytoplasm = 0; CIT is "citrate";
  species coA in cytoplasm = 1;
  species OAA in cytoplasm = 0.1; OAA is "oxaloacetate";
  species ac_coA in cytoplasm = 0.3; ac_coA is "acetyl-coA";
  species mal_coA in cytoplasm = 0.3; mal_coA is "malonyl-coA";
  species $HCO3 in cytoplasm = 20; HCO3 is "HCO3-";
  species $NADPH in cytoplasm = 20;
  species pal_acid in cytoplasm = 0.2; pal_acid is "palmitate";
  species $NADP in cytoplasm = 10;

  // Reactions:
  GLT: $GLCo => GLCi; K_GLT*GLCo; GLT is "glucose transport";
    K_GLT = 0.1 litre_per_min;
  HK: GLCi + ATP -> G6P + $ADP; kcat_HK*E_HK*(GLCi/(GLCi + Km_HK)); HK is "hexokinase";
    kcat_HK = 63.6 litre_per_min; Km_HK = 0.13 mM; E_HK = 1 mM;
  ISO: G6P -> F6P; kcat_ISO*E_ISO*(G6P/(G6P + Km_ISO)); ISO is "phosphoglucoisomerase";
    kcat_ISO = 30000 litre_per_min; E_ISO = 0.1 mM; Km_ISO = 0.29 mM;
  PFK: F6P + ATP -> F16P + $ADP; kcat_PFK*E_PFK*(F6P/(F6P + Km_PFK)); PFK is "phosphofructokinase";
    kcat_PFK = 21420 litre_per_min; E_PFK = 0.00000677 mM; Km_PFK = 0.29 mM;
  ALD: F16P -> GP + G3P; kcat_ALD*E_ALD*(F16P/(F16P + Km_ALD)); ALD is "fructose-bisphosphate aldolase";
    kcat_ALD = 36.6 litre_per_min; Km_ALD = 0.0023 mM; E_ALD = 0.0000406 mM;
  TRIO: GP -> G3P; kcat_TRIO*E_TRIO*(GP/(GP + Km_TRIO)); TRIO is "triosephosphate isomerase";
    kcat_TRIO = 534000 litre_per_min; Km_TRIO = 1 mM; E_TRIO = 0.0000015 mM;
  TRDE: G3P + $PHOS + NAD -> BPG + NADH + $H; kcat_TRDE*E_TRDE*(G3P/(G3P + Km_TRDE)); TRDE is "glyceraldehyde-3-phosphate dehydrogenase(phosporylating)";
    kcat_TRDE = 960 litre_per_min; Km_TRDE = 0.42 mM; E_TRDE = 0.000026428 mM;
  PKIN: P3G + ATP -> BPG + $ADP; kcat_PKIN*E_PKIN*(P3G/(P3G + Km_PKIN)); PKIN is "phosphoglycerate kinase";
    kcat_PKIN = 21240 litre_per_min; Km_PKIN = 0.77 mM; E_PKIN = 0.02 mM;
  PISO: P3G -> P2G; kcat_PISO*E_PISO*(P3G/(P3G + Km_PISO)); PISO is "phosphoglyceromutase";
    kcat_PISO = 23040 litre_per_min; Km_PISO = 0.65 mM; E_PISO = 0.01 mM;
  PEPH: P2G -> PEP + $H2O; kcat_PEPH*E_PEPH*(P2G/(P2G + Km_PEPH)); PEPH is "phosphopyruvate hydratase";
    Km_PEPH = 0.3 mM; kcat_PEPH = 4680 litre_per_min; E_PEPH = 0.0009 mM;
  PYKIN: PEP + ATP -> PYR + $ADP; kcat_PYKIN*E_PYKIN*(PEP/(PEP + Km_PYKIN)); PYKIN is "pyruvate kinase";
    Km_PYKIN = 1.18 mM; kcat_PYKIN = 13920 litre_per_min; E_PYKIN = 0.0001 mM;
  PYTR: PYR -> PYR_M; k_PYTR*PYR; PYTR is "pyruvate transport";
    k_PYTR = 1 litre_per_min;
  PYRDE: PYR_M + NAD_M + coA_M -> ac_coA_M + CO2_M + NADH_M; kcat_PYRDE*E_PYRDE*(PYR_M/(PYR_M + Km_PYRDE)); PYRDE is "pyruvate dehydrogenase";
    Km_PYRDE = 0.0648 mM; kcat_PYRDE = 4194 litre_per_min; E_PYRDE = 0.5 mM;
  CITS: ac_coA_M + OAA_M + $H2O_M -> CIT_M + coA_M; kcat_CIT*E_CIT*(ac_coA_M/(ac_coA_M + Km_CIT)); CITS is "citrate synthase";
    Km_CIT = 0.0077 mM; kcat_CIT = 1560 litre_per_min; E_CIT = 0.6 mM;
  CITR: CIT_M -> CIT; k_CITR*CIT_M; CITR is "citrate transport";
    k_CITR = 1 litre_per_min;
  CITL: CIT + ATP + coA -> ac_coA + $ADP + OAA; kcat_CITL*E_CITL*(CIT/(CIT + Km_CITL)); CITL is "citrate lyase";
    Km_CITL = 0.0738 mM; kcat_CITL = 1018.44 litre_per_min; E_CITL = 1 mM;
  ACC: ac_coA + ATP + $HCO3 -> mal_coA + $ADP + $PHOS; kcat_ACC*E_ACC*(ac_coA/(ac_coA + Km_ACC)); ACC is "acetyl-coa carboxylase";
    Km_ACC = 0.053 mM; kcat_ACC = 510 litre_per_min; E_ACC = 1 mM;
  FAS: 7 mal_coA + ac_coA + 14 $NADPH + 14 $H -> pal_acid + 8 coA + 7 $CO2 + 14 $NADP + 6 $H2O; kcat_FAS*E_FAS*(mal_coA/(mal_coA + Km_FAS)); FAS is "fatty acid synthase (16:0)";
    kcat_FAS = 162 litre_per_min; Km_FAS = 0.006 mM; E_FAS = 1 mM;

  // Unit definitions:
  unit substance = 1e-3 mole; substance is "millimole";
  unit time = 60 second; time is "minute";
  unit mM = 1e-3 mole / litre;
  unit mM_per_min = 1e-3 mole / (litre * 60 second); mM_per_min is "mM per minute";
  unit per_min = 1 / (60 second); per_min is "per minute";
  unit per_mM_per_min = 10 litre / (1e-3 mole * 600 second); per_mM_per_min is "per mM per minute";
  unit per_mM_squared_per_min = (10 litre)^2 / ((1e-3 mole)^2 * 600 second); per_mM_squared_per_min is "per mM squared per minute";
  unit per_mM = 10 litre / (1e-3 mole);
  unit litre_per_min = litre / (60 second); litre_per_min is "litre per minute";
end
